// COMSOL Multiphysics 5.1.0.234 model "Modelo_guia_PMC.mph"
// sin título
// Outline of the model tree

Geometry
  geom1 "Geometría 1" (2D, length unit µm)
    r1: Rectangle "Rectángulo 1" | pos = {-0.05, 0.2}; type = solid; base = center; size = {1, 0.7}
    r2: Rectangle "Rectángulo 2" | pos = {0.45, -0.15}; type = solid; base = corner; size = {1, 0.7}
    r3: Rectangle "Rectángulo 3" | pos = {-1.55, -0.15}; type = solid; base = corner; size = {1, 0.7}
    c1: Circle "Círculo 1" | pos = {-0.05, 0.2}; type = solid; base = center; r = 0.15
    fin: Finalize "Formar unión"

Materials
  mat1: Common "Air" on domains 1, 3, 4
    def "Básico"
      relpermeability = 1
      relpermittivity = 1
      dynamicviscosity = eta(T[1/K])[Pa*s]
      ratioofspecificheat = 1.4
      electricconductivity = 0[S/m]
      heatcapacity = Cp(T[1/K])[J/(kg*K)]
      density = rho(pA[1/Pa],T[1/K])[kg/m^3]
      thermalconductivity = k(T[1/K])[W/(m*K)]
      soundspeed = cs(T[1/K])[m/s]
      eta: Piecewise "Por secciones" | arg = T; extrap = constant; pieces = {200.0, 1600.0, -8.38278E-7+8.35717342E-8*T^1-7.69429583E-11*T^2+4.6437266E-14*T^3-1.06585607E-17*T^4}
      Cp: Piecewise "Por secciones 2" | arg = T; extrap = constant; pieces = {200.0, 1600.0, 1047.63657-0.372589265*T^1+9.45304214E-4*T^2-6.02409443E-7*T^3+1.2858961E-10*T^4}
      rho: Analytic "Analítico" | expr = pA*0.02897/8.314/T; args = {pA, T}; dermethod = manual; argders = {{pA, d(pA*0.02897/8.314/T,pA)}, {T, d(pA*0.02897/8.314/T,T)}}
      k: Piecewise "Por secciones 3" | arg = T; extrap = constant; pieces = {200.0, 1600.0, -0.00227583562+1.15480022E-4*T^1-7.90252856E-8*T^2+4.11702505E-11*T^3-7.43864331E-15*T^4}
      cs: Analytic "Analítico 2" | expr = sqrt(1.4*287*T); args = T; dermethod = manual; argders = {T, d(sqrt(1.4*287*T),T)}
    RefractiveIndex "Índice de refracción"
      n = 1
      ki = 0
  mat3: Common "Material 3" on domains 2
    def "Básico"
      relpermeability = 0.00001
      relpermittivity = 0.00001
      electricconductivity = 0.0001
    RefractiveIndex "Índice de refracción"
      n = 0.00001
      ki = 0.00001

Physics
  ewfd: ElectromagneticWavesFrequencyDomain "Ondas electromagnéticas, dominio de la frecuencia" on domains 1-4
    dependent variable E = {Ex, Ey, Ez}
    EquationForm.form = Frequency
    components.components = threecomponent
    PortSweepSettings.useSweep = 0
    outofplanewavenumber.kz = (2*pi)/(600e-9)
    MeshControl.EnableMeshControl = 0
    MeshControl.PhysicsControlledMeshMaximumElementSize = 0.001
    wee1: WaveEquationElectric "Ecuación de onda eléctrica 1" (default)
      DisplacementFieldModel = DrudeLorentzDispersionModel
      omegap = 4.18e14
      materialType = from_mat
    pec1: PerfectElectricConductor "Conductor eléctrico perfecto 1" (default)
    init1: init "Valores iniciales 1" (default) | E = {0, 0, 0}
    pmc1: PerfectMagneticConductor "Conductor magnético perfecto 1" on boundaries 2, 3, 5, 6, 8, 9, 11-14
    sctr1: Scattering "Condición de contorno de difracción 1" on boundaries 1
      IncidentField = EField
      E0i = {0, 0, 1}
      kdir = {-ewfd.nx, -ewfd.ny, 0}
    wee2: WaveEquationElectric "Ecuación de onda eléctrica 2" on domains 1, 3, 4
      DisplacementFieldModel = RelativePermittivity
    sctr2: Scattering "Condición de contorno de difracción 2" on boundaries 10

Mesh
  mesh1 "Malla 1" (physics-controlled)
    size: MeshSizeDefault "Tamaño" | hauto = 1

Studies
  std1 "Estudio 1"
    freq: Frequency "Dominio de la frecuencia" | punit = Hz; plist = 1.5e15

Solver configurations
  sol1 "Solución 1" (study std1)
    v1: Variables "Variables dependientes 1"
    s1: Stationary "Resolvedor estacionario 1"
      dDef: Direct "Directo"
      p1: Parametric "Paramétrico 1" | pname = freq; plistarr = 1.5e15; punit = Hz; pcontinuationmode = no
      fc1: FullyCoupled "Completamente acoplado 1" | linsolver = dDef
      prob1: SolverProblem "Información 1"
        error1: SolverError "Error 1"

Datasets
  dset1: Solution | solution = sol1

Plots
  pg1: PlotGroup2D "Campo eléctrico (ewfd)" | data = none
    surf1: Surface "Superficie 1" | expr = ewfd.normE
  pg2: PlotGroup2D "Campo eléctrico (ewfd) 1" | data = dset1
    surf1: Surface "Superficie 1" | expr = ewfd.normE